*Heading
** Job name: mojtabaabdolkhani Model name: Model-1
** Generated by: Abaqus/CAE 6.12-1
*Preprint, echo=NO, model=NO, history=NO, contact=NO
**
** PARTS
**
*Part, name=plate2D
*End Part
**
**
** ASSEMBLY
**
*Assembly, name=Assembly
**
*Instance, name=plate2D-1, part=plate2D
*Node
      1,   70.4000015,   26.3999996
      2,   114.400002,   26.3999996
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*Element, type=CINPS4
1, 19,  1,  2, 18
2,  4, 19, 18,  3
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*Element, type=CPS4
11, 32, 33, 30, 31
12, 32, 34, 40, 33
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*Nset, nset=Set-1, generate
  1,  43,   1
*Elset, elset=Set-1, generate
  1,  31,   1
** Section: Section-1
*Solid Section, elset=Set-1, material=STEEL
0.001,
*End Instance
**
*Nset, nset=Set-1, instance=plate2D-1
  9, 10, 15, 26, 27
*Elset, elset=Set-1, instance=plate2D-1
  6, 15, 16, 18
*Nset, nset=Set-2, instance=plate2D-1
 11, 12, 17, 30, 31
*Elset, elset=Set-2, instance=plate2D-1
  8, 11, 17, 19
*Elset, elset=_Surf-1_S4, internal, instance=plate2D-1
 16,
*Elset, elset=_Surf-1_S2, internal, instance=plate2D-1
 29,
*Elset, elset=_Surf-1_S1, internal, instance=plate2D-1
 19, 21
*Surface, type=ELEMENT, name=Surf-1
_Surf-1_S4, S4
_Surf-1_S2, S2
_Surf-1_S1, S1
*End Assembly
**
** MATERIALS
**
*Material, name=STEEL
*Elastic
 2e+11, 0.3
** ----------------------------------------------------------------
**
** STEP: Step-pressure
**
*Step, name=Step-pressure
*Static
1., 1., 1e-05, 1.
**
** BOUNDARY CONDITIONS
**
** Name: BC-bot Type: Symmetry/Antisymmetry/Encastre
*Boundary
Set-2, YSYMM
** Name: BC-left Type: Symmetry/Antisymmetry/Encastre
*Boundary
Set-1, XSYMM
**
** LOADS
**
** Name: Load-pressure   Type: Pressure
*Dsload
Surf-1, P, 100.
**
** OUTPUT REQUESTS
**
*Restart, write, frequency=0
**
** FIELD OUTPUT: F-Output-1
**
*Output, field, variable=PRESELECT
**
** HISTORY OUTPUT: H-Output-1
**
*Output, history, variable=PRESELECT
*End Step
