*Heading
** Job name: Adaptivity-uniform-iter6 Model name: Model-1
** Generated by: Abaqus/CAE 6.14-1
*Preprint, echo=NO, model=NO, history=NO, contact=NO
**
** PARTS
**
*Part, name=Part-1
*End Part
**
**
** ASSEMBLY
**
*Assembly, name=Assembly
**
*Instance, name=Part-1-1, part=Part-1
*Node
      1,           0.,         176.
      2,           0.,          44.
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*Element, type=CPE3
   1,  8983,  9400, 19819
   2, 26553, 12312, 12065
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*Element, type=CPE4R
 1028,  3215, 18152, 27347, 27039
 1029, 27039, 27347, 17974,  3173
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*Nset, nset=Set-1, generate
     1,  33184,      1
*Elset, elset=Set-1, generate
     1,  33365,      1
** Section: Section-1
*Solid Section, elset=Set-1, material=Material-1
1.,
*End Instance
**
*Nset, nset=Set-1, instance=Part-1-1
     1,     2,    14,    15,    16,    17
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*Elset, elset=Set-1, instance=Part-1-1
  1082,  1084,  1096,  1102,  1230,  1236
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*Nset, nset=Set-2, instance=Part-1-1
    10,    11,    18,    19,    20,    21
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*Elset, elset=Set-2, instance=Part-1-1
  1171,  1172,  1198,  1200,  1260,  1261
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*Nset, nset=Set-4, instance=Part-1-1, generate
     1,  33184,      1
*Elset, elset=Set-4, instance=Part-1-1, generate
     1,  33365,      1
*Elset, elset=_Surf-1_S4, internal, instance=Part-1-1
  1174,  1550,  1560,  1582,  2204,  2206
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*Elset, elset=_Surf-1_S2, internal, instance=Part-1-1
  1175,  1581,  2112,  2212,  2227,  2235
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*Elset, elset=_Surf-1_S1, internal, instance=Part-1-1
  1177,  1212,  1481,  1531,  1551,  2111
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*Elset, elset=_Surf-1_S3, internal, instance=Part-1-1
  1213,  1530,  1571,  2149,  2150,  2153
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*Surface, type=ELEMENT, name=Surf-1
_Surf-1_S4, S4
_Surf-1_S2, S2
_Surf-1_S1, S1
_Surf-1_S3, S3
*End Assembly
**
** MATERIALS
**
*Material, name=Material-1
*Elastic
1000., 0.3
** ----------------------------------------------------------------
**
** STEP: Step-1
**
*Step, name=Step-1, nlgeom=NO
*Static
1., 1., 1e-05, 1.
**
** BOUNDARY CONDITIONS
**
** Name: BC-x-symm Type: Symmetry/Antisymmetry/Encastre
*Boundary
Set-1, XSYMM
** Name: BC-y-symm Type: Symmetry/Antisymmetry/Encastre
*Boundary
Set-2, YSYMM
**
** LOADS
**
** Name: Load-1   Type: Pressure
*Dsload
Surf-1, P, 1e-05
**
** OUTPUT REQUESTS
**
*Restart, write, frequency=0
**
** FIELD OUTPUT: F-Output-1
**
*Output, field, variable=PRESELECT
**
** FIELD OUTPUT:  from REMESHING RULE: RemeshingRule-1
**
*Output, field, frequency=99999
*Element Output, elset=Set-4, directions=YES
ENDENERI, ENDEN, ELEN, MISESERI, MISESAVG, S, EVOL
**
** HISTORY OUTPUT: H-Output-1
**
*Output, history, variable=PRESELECT
*End Step
