*Heading
** Job name: asli Model name: Model-2
** Generated by: Abaqus/CAE 6.14-1
*Preprint, echo=NO, model=NO, history=NO, contact=NO
** ----------------------------------------------------------------
**
** PART INSTANCE: col_Z1-1
**
*System
        -15.,        -15.,       4000.,        -14.,        -15.,       4000.
*Node
      1,         200.,         200.,        2000.
      2,         200.,         150.,        2000.
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*Element, type=Z1, file=col
1,    1,    2,    3,    4,    5,  201,  202,  203,  204,  205,  206,  207,  208,  209,  210,
    406,  407,  408,  409,  410,  411,  412,  413,  414,  415,  611,  612,  613,  614,  615,  616,
    617,  618,  619,  620,  816,  817,  818,  819,  820,  821,  822,  823,  824,  825, 1021, 1022,
   1023, 1024, 1025
*Elset, elset=col_Z1-1__col_Z1_Elset
 1,
*Substructure Property, elset=col_Z1-1__col_Z1_Elset
        -15.,         -15.,        4000.
** ----------------------------------------------------------------
**
** PART INSTANCE: col_Z1-2
**
*System
        -15.,       1815.,       4000.,        -14.,       1815.,       4000.
*Node
   2001,         200.,         200.,        2000.
   2002,         200.,         150.,        2000.
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*Element, type=Z1, file=col
2, 2001, 2002, 2003, 2004, 2005, 2201, 2202, 2203, 2204, 2205, 2206, 2207, 2208, 2209, 2210,
   2406, 2407, 2408, 2409, 2410, 2411, 2412, 2413, 2414, 2415, 2611, 2612, 2613, 2614, 2615, 2616,
   2617, 2618, 2619, 2620, 2816, 2817, 2818, 2819, 2820, 2821, 2822, 2823, 2824, 2825, 3021, 3022,
   3023, 3024, 3025
*Elset, elset=col_Z1-2__col_Z1_Elset
 2,
*Substructure Property, elset=col_Z1-2__col_Z1_Elset
        -15.,        1815.,        4000.
** ----------------------------------------------------------------
**
** PART INSTANCE: col_Z1-3
**
*System
       1815.,        -15.,       4000.,       1816.,        -15.,       4000.
*Node
   3026,         200.,         200.,        2000.
   3027,         200.,         150.,        2000.
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*Element, type=Z1, file=col
3, 3026, 3027, 3028, 3029, 3030, 3226, 3227, 3228, 3229, 3230, 3231, 3232, 3233, 3234, 3235,
   3431, 3432, 3433, 3434, 3435, 3436, 3437, 3438, 3439, 3440, 3636, 3637, 3638, 3639, 3640, 3641,
   3642, 3643, 3644, 3645, 3841, 3842, 3843, 3844, 3845, 3846, 3847, 3848, 3849, 3850, 4046, 4047,
   4048, 4049, 4050
*Elset, elset=col_Z1-3__col_Z1_Elset
 3,
*Substructure Property, elset=col_Z1-3__col_Z1_Elset
       1815.,         -15.,        4000.
** ----------------------------------------------------------------
**
** PART INSTANCE: col_Z1-4
**
*System
       1815.,       1815.,       4000.,       1816.,       1815.,       4000.
*Node
   4051,         200.,         200.,        2000.
   4052,         200.,         150.,        2000.
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*Element, type=Z1, file=col
4, 4051, 4052, 4053, 4054, 4055, 4251, 4252, 4253, 4254, 4255, 4256, 4257, 4258, 4259, 4260,
   4456, 4457, 4458, 4459, 4460, 4461, 4462, 4463, 4464, 4465, 4661, 4662, 4663, 4664, 4665, 4666,
   4667, 4668, 4669, 4670, 4866, 4867, 4868, 4869, 4870, 4871, 4872, 4873, 4874, 4875, 5071, 5072,
   5073, 5074, 5075
*Elset, elset=col_Z1-4__col_Z1_Elset
 4,
*Substructure Property, elset=col_Z1-4__col_Z1_Elset
       1815.,        1815.,        4000.
** ----------------------------------------------------------------
**
** PART INSTANCE: Part-2-1
**
*System
       1165.,        610.,       4000.,       1164.,        610.,       4000.
       1165.,        611.,       4000.
*Node
   5076,        -835.,        1390.,        2000.
   5077,        1165.,        1390.,        2000.
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*Element, type=C3D8R
    5,  5122,  6854,  6855,  5123, 13337, 35420, 35421, 13336
    6,  5400,  5399,  6856,  6855, 17977, 17978, 35422, 35421
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*Nset, nset=Part-2-1_Set-1, generate
  5076,  49363,      1
*Elset, elset=Part-2-1_Set-1, generate
     5,  29225,      1
** Section: Section-1
*Solid Section, elset=Part-2-1_Set-1, material=Material-st
,
*System
*Nset, nset=Set-2
2001,2002,2003,2004,2005,2206
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*Nset, nset=Set-2
   1,   2,   3,   4,   5, 206
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*Nset, nset=Set-2
3026,3027,3028,3029,3030,3231
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*Nset, nset=Set-2
4051,4052,4053,4054,4055,4256
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*Nset, nset=Set-4
   1,   2,   3,   4,   5, 206
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*Nset, nset=Set-4
2001,2002,2003,2004,2005,2206
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*Nset, nset=Set-4
3026,3027,3028,3029,3030,3231
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*Nset, nset=Set-4
4051,4052,4053,4054,4055,4256
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*Nset, nset=m_Set-5
 4251, 4252, 4253, 4254, 4255, 4456
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*Nset, nset=m_Set-5
 2201, 2202, 2203, 2204, 2205, 2406
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*Nset, nset=m_Set-5
 3226, 3227, 3228, 3229, 3230, 3431
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*Nset, nset=m_Set-5
  201,  202,  203,  204,  205,  406
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*Elset, elset=_Surf-6_S3
   269,   282,   285,   289,   328,   332
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*Elset, elset=_Surf-6_S5
   127,   287,   314,   316,   318,   321
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*Elset, elset=_Surf-6_S4
    55,   276,   280,   317,   319,   320
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*Elset, elset=_Surf-6_S6
    40,    51,   273,   281,   283,   284
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*Surface, type=ELEMENT, name=Surf-6
_Surf-6_S3, S3
_Surf-6_S5, S5
_Surf-6_S4, S4
_Surf-6_S6, S6
*Elset, elset=_s_Surf-5_S2, generate
 13645,  15585,      1
*Surface, type=ELEMENT, name=s_Surf-5
_s_Surf-5_S2, S2
*Surface, type=NODE, name=m_Set-5_CNS_
m_Set-5, 1.
** Constraint: Constraint-1
*Tie, name=Constraint-1, adjust=yes, position tolerance=0.01
s_Surf-5, m_Set-5_CNS_
**
** MATERIALS
**
*Material, name=Material-st
*Elastic
200000., 0.3
** ----------------------------------------------------------------
**
** STEP: Step-1
**
*Step, name=Step-1, nlgeom=NO
*Static
1., 1., 1e-05, 1.
**
** BOUNDARY CONDITIONS
**
** Name: BC-1 Type: Displacement/Rotation
*Boundary
Set-4, 1, 1
Set-4, 2, 2
Set-4, 3, 3
Set-4, 4, 4
Set-4, 5, 5
Set-4, 6, 6
**
** LOADS
**
** Name: Load-1   Type: Pressure
*Dsload
Surf-6, P, 0.02
**
** OUTPUT REQUESTS
**
*Restart, write, frequency=0
**
** FIELD OUTPUT: F-Output-1
**
*Output, field, variable=PRESELECT
**
** HISTORY OUTPUT: H-Output-1
**
*Output, history, variable=PRESELECT
*End Step
