*Heading
** Job name: col Model name: Model-1
** Generated by: Abaqus/CAE 6.14-1
*Preprint, echo=NO, model=NO, history=NO, contact=NO
** ----------------------------------------------------------------
**
** PART INSTANCE: Part-1-1
**
*Node
      1,         200.,         200.,        2000.
      2,         200.,         150.,        2000.
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*Element, type=C3D8R
  1,  206,  207,  212,  211,    1,    2,    7,    6
  2,  207,  208,  213,  212,    2,    3,    8,    7
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*Nset, nset=Part-1-1_Set-1, generate
    1,  1025,     1
*Elset, elset=Part-1-1_Set-1, generate
   1,  640,    1
** Section: Section-1
*Solid Section, elset=Part-1-1_Set-1, material=Material-st
,
*System
*Nset, nset=Set-1
    1,    2,    3,    4,    5,  201
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**
** MATERIALS
**
*Material, name=Material-st
*Elastic
200000., 0.3
** ----------------------------------------------------------------
**
** STEP: Step-1
**
*Step, name=Step-1, nlgeom=NO
*Substructure Generate, overwrite, type=Z1, recovery matrix=YES
*Damping Controls, structural=COMBINED, viscous=COMBINED
*Retained Nodal Dofs
Set-1, 1, 3
*End Step
